*Heading
** Job name: ciloindro Model name: Model-1
** Generated by: Abaqus/CAE 2016
*Preprint, echo=NO, model=NO, history=NO, contact=NO
**
** PARTS
**
*Part, name=Part-2
*Node
*Node
      1, -0.000298778992, 0.00146994251,           0.
      2, -0.000676515163, 0.0013387783,           0.
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*Element, type=C3D8T
      1,  1079,  1128,  1191,  1012,    94,   143,   206,    27
    2,  1166,  1016,  1015,  1180,   181,    31,    30,   195
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*Nset, nset=ALL, generate
    1,   30535,     1
*Elset, elset=MATRIX, generate
    1,  28110,     1
** Section: Section-1
*Solid Section, elset=MATRIX, material=PORO
,
*End Part
**
**
** ASSEMBLY
**
*Assembly, name=Assembly
**
*Instance, name=Part-2-1, part=Part-2
*End Instance
**
*Nset, nset=bottom, instance=Part-2-1, generate
   1,  985,    1
*Nset, nset=ALL, instance=Part-2-1, generate
   1,  30535,    1
*Elset, elset=Set-1, instance=Part-2-1, generate
   1,  278,    1
*Nset, nset=Set-2, instance=Part-2-1, generate
   1,  304,    1
*Elset, elset=Set-2, instance=Part-2-1, generate
   1,  278,    1
*Nset, nset=Set-3, instance=Part-2-1, generate
    1,  5168,     1
*Elset, elset=Set-3, instance=Part-2-1, generate
    1,  4448,     1
*Nset, nset=appliedload, instance=Part-2-1, generate
 4865,  5168,     1
*Elset, elset=appliedload, instance=Part-2-1, generate
 4171,  4448,     1
*Nset, nset=ENDLEFT, instance=Part-2-1, generate
  1,  985,    1
*Nset, nset=Set-10, instance=PART-2-1
     1,     2,     3,     4,     5,     6
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*Elset, elset=base, instance=Part-2-1, generate
      1,  937,    1
*Elset, elset=_Surf-1_S1, internal, instance=Part-2-1, generate
 27174,  28110,      1
*Surface, type=ELEMENT, name=Surf-1
_Surf-1_S1, S1
*End Assembly
**
** MATERIALS
**
*Material, name=PORO
*Density
1.,
*Depvar
      4,
*Elastic
 0.2e+6, 0.3
*Expansion
1.3541e-6
*User output variables
2
*User Material, constants=4, type=THERMAL
 **1.3e+10,  0.88, 1e-07,  0.65,   1.2
**beta,k/mi,KB/alfa, B
0, 8.33e-8,2.16e5, 0.88
** PHYSICAL CONSTANTS
**
*Physical Constants, absolute zero=0
**
** PREDEFINED FIELDS
**
** Name: Field-1   Type: Temperature
*Initial Conditions, type=TEMPERATURE
ALL, 0
** Name: BC-3 Type: Displacement/Rotation
*Boundary
Set-10, 1, 1
Set-10, 2, 2
*Boundary
ENDLEFT, ENCASTRE
** Name: BC-2 Type: Temperature
*Boundary
ENDLEFT, 11, 11
** ----------------------------------------------------------------
**
** STEP: Step-1
**
*Step, name=Step-1, nlgeom=NO, inc=100
*Coupled Temperature-displacement, creep=none
**, deltmx=50000.
1.2e-05, 4.8e-4
**, 0.00048, 4.8e-09, 0.00048
*Controls, reset
*Controls, parameters=time incrementation
 10000,10000,8000,12000,500, 5, , , ,
 , , , , , , , ,
**
** BOUNDARY CONDITIONS
**
** Name: BC-1 Type: Symmetry/Antisymmetry/Encastre
**
** LOADS
**
** Name: Load-1   Type: Pressure
*Dsload
Surf-1, P, 0.07e+06
**
** OUTPUT REQUESTS
**
*Restart, write, frequency=0
*Output, field, frequency=1
*Node Output
CF, RF, U, NT
*Element output
uvarm, S, E
*End Step
